*Heading
** Job name: UMAT_Puck_test Model name: Fracture_CFRP_Tube-UMAT-Puck
** Generated by: Abaqus/CAE 2022
*Preprint, echo=NO, model=NO, history=NO, contact=NO
**
** PARTS
**
*Part, name=PART-1-COPY
*Node
      1,          10.,  -20.8510342,         253.
      2,          10.,  -20.5039063,         253.
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*Element, type=C3D8
   1,  3793,   420,  3775, 12771,   415,     1,   419,  3771
   2, 12771,  3775,  3776, 12772,  3771,   419,   418,  3772
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*Nset, nset=CYLINDER_3D, generate
     1,  18394,      1
*Elset, elset=CYLINDER_3D, generate
     1,  16640,      1
*Nset, nset=SET-RP-2
   379,   380,   381,   382,   383,   384
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*Elset, elset=SET-RP-2
 11559, 11560, 11561, 11562, 11563, 11564
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*Nset, nset=SET-RP-1
   343,   344,   345,   346,   347,   348
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*Elset, elset=SET-RP-1
  6897,  6898,  6899,  6900,  6901,  6902
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*Nset, nset=SET-TOP-EDGE
  156,  157,  313,  389, 1208, 1209
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*Elset, elset=SET-TOP-EDGE
  2090,  2092,  2094,  2121,  2122,  4276
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*Nset, nset=SET-SPDA-POINT
  71,  72,  74,  80,  82,  84
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*Elset, elset=SET-SPDA-POINT
  885,  890,  901,  902,  925,  930
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*Nset, nset=OUTER_SURFACE
    89,    90,   118,   119,   156,   157
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*Elset, elset=OUTER_SURFACE
  1396,  1397,  1398,  1399,  1400,  1406
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*Elset, elset=_I1, internal
     1,     2,     3,     4,     5,     6
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*Elset, elset=_I2, internal
    59,    60,    61,    62,    63,    64
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*Elset, elset=_I3, internal
   233,   234,   235,   236,   237,   238
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*Elset, elset=_I4, internal
   291,   292,   293,   294,   295,   296
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*Elset, elset=_I5, internal
   349,   350,   351,   352,   353,   354
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*Elset, elset=_I6, internal
   407,   408,   409,   410,   411,   412
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*Elset, elset=_I7, internal
   465,   466,   467,   468,   469,   470
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*Elset, elset=_I8, internal
   523,   524,   525,   526,   527,   528
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*Elset, elset=_OUTER_SURFACE_S4_1, internal
   523,   524,   525,   526,   527,   528
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*Elset, elset=_OUTER_SURFACE_S3_1, internal
  539,  540,  541,  542,  571,  572
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*Elset, elset=_OUTER_SURFACE_S2_1, internal
  575,  576,  577,  578,  579,  580
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*Elset, elset=_OUTER_SURFACE_S6_1, internal
 1051, 1053, 1055, 1057, 1059, 1061
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*Elset, elset=_OUTER_SURFACE_S5_1, internal
  1396,  1397,  1398,  1399,  1400,  1406
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*Surface, type=ELEMENT, name=OUTER_SURFACE
_OUTER_SURFACE_S4_1, S4
_OUTER_SURFACE_S3_1, S3
_OUTER_SURFACE_S2_1, S2
_OUTER_SURFACE_S6_1, S6
_OUTER_SURFACE_S5_1, S5
*Elset, elset=_INTERNAL_SURFACE_S6_1, internal
   891,   893,   895,   897,   899,   901
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*Elset, elset=_INTERNAL_SURFACE_S5_1, internal
   916,   917,   918,   919,   920,   926
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*Elset, elset=_INTERNAL_SURFACE_S4_1, internal
    65,    66,    67,    68,    69,    70
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*Elset, elset=_INTERNAL_SURFACE_S2_1, internal, generate
 113,  116,    1
*Elset, elset=_INTERNAL_SURFACE_S3_1, internal
   71,   72,   73,   74,  123,  124
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*Surface, type=ELEMENT, name=INTERNAL_SURFACE
_INTERNAL_SURFACE_S6_1, S6
_INTERNAL_SURFACE_S5_1, S5
_INTERNAL_SURFACE_S4_1, S4
_INTERNAL_SURFACE_S2_1, S2
_INTERNAL_SURFACE_S3_1, S3
*Orientation, name=Ori-PART-1-COPY_ORI-7-DISCORIENT, system=RECTANGULAR
PART-1-COPY_ORI-7-DISCORIENT
3, 135.
** Section: Section-1-_I1
*Solid Section, elset=_I1, orientation=Ori-PART-1-COPY_ORI-7-DISCORIENT, controls=EC-1, material=CFRP-UMAT-Puck
,
*Orientation, name=Ori-PART-1-COPY_ORI-8-DISCORIENT, system=RECTANGULAR
PART-1-COPY_ORI-8-DISCORIENT
3, 45.
** Section: Section-2-_I2
*Solid Section, elset=_I2, orientation=Ori-PART-1-COPY_ORI-8-DISCORIENT, controls=EC-1, material=CFRP-UMAT-Puck
,
*Orientation, name=Ori-PART-1-COPY_ORI-6-DISCORIENT, system=RECTANGULAR
PART-1-COPY_ORI-6-DISCORIENT
3, 0.
** Section: Section-3-_I3
*Solid Section, elset=_I3, orientation=Ori-PART-1-COPY_ORI-6-DISCORIENT, controls=EC-1, material=CFRP-UMAT-Puck
,
*Orientation, name=Ori-PART-1-COPY_ORI-5-DISCORIENT, system=RECTANGULAR
PART-1-COPY_ORI-5-DISCORIENT
3, 90.
** Section: Section-4-_I4
*Solid Section, elset=_I4, orientation=Ori-PART-1-COPY_ORI-5-DISCORIENT, controls=EC-1, material=CFRP-UMAT-Puck
,
*Orientation, name=Ori-PART-1-COPY_ORI-4-DISCORIENT, system=RECTANGULAR
PART-1-COPY_ORI-4-DISCORIENT
3, 90.
** Section: Section-5-_I5
*Solid Section, elset=_I5, orientation=Ori-PART-1-COPY_ORI-4-DISCORIENT, controls=EC-1, material=CFRP-UMAT-Puck
,
*Orientation, name=Ori-PART-1-COPY_ORI-3-DISCORIENT, system=RECTANGULAR
PART-1-COPY_ORI-3-DISCORIENT
3, 0.
** Section: Section-6-_I6
*Solid Section, elset=_I6, orientation=Ori-PART-1-COPY_ORI-3-DISCORIENT, controls=EC-1, material=CFRP-UMAT-Puck
,
*Orientation, name=Ori-PART-1-COPY_ORI-2-DISCORIENT, system=RECTANGULAR
PART-1-COPY_ORI-2-DISCORIENT
3, 135.
** Section: Section-7-_I7
*Solid Section, elset=_I7, orientation=Ori-PART-1-COPY_ORI-2-DISCORIENT, controls=EC-1, material=CFRP-UMAT-Puck
,
*Orientation, name=Ori-PART-1-COPY_ORI-1-DISCORIENT, system=RECTANGULAR
PART-1-COPY_ORI-1-DISCORIENT
3, 45.
** Section: Section-8-_I8
*Solid Section, elset=_I8, orientation=Ori-PART-1-COPY_ORI-1-DISCORIENT, controls=EC-1, material=CFRP-UMAT-Puck
,
*Distribution, name=PART-1-COPY_ORI-7-DISCORIENT, location=ELEMENT, Table=PART-1-COPY_ORI-7-DISCORIENT_Table
,           1.,           0.,           0.,           0.,           1.,           0.
1, 0.919580161571503, 0.392902493476868,           0.,           0.,           0.,           1.
2, 0.951190292835236, 0.308605045080185,           0.,           0.,           0.,           1.
3, 0.975080370903015, 0.221852004528046,           0.,           0.,           0.,           1.
4, 0.919683396816254, 0.392660677433014,           0.,           0.,           0.,           1.
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13560, 0.993712186813354, 0.111964471638203,           0.,           0.,           0.,           1.
*Distribution, name=PART-1-COPY_ORI-8-DISCORIENT, location=ELEMENT, Table=PART-1-COPY_ORI-8-DISCORIENT_Table
,           1.,           0.,           0.,           0.,           1.,           0.
59, 0.971017003059387, 0.23901030421257,           0.,           0.,           0.,           1.
60, 0.949447810649872, 0.313924968242645,           0.,           0.,           0.,           1.
61, 0.917792737483978, 0.397059798240662,           0.,           0.,           0.,           1.
62, 0.974032580852509, 0.226407915353775,           0.,           0.,           0.,           1.
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16640, -0.993712186813354, 0.111964471638203,           0.,           0.,           0.,           1.
*Distribution, name=PART-1-COPY_ORI-6-DISCORIENT, location=ELEMENT, Table=PART-1-COPY_ORI-6-DISCORIENT_Table
,           1.,           0.,           0.,           0.,           1.,           0.
233, 0.922338247299194, 0.386383503675461,           0.,           0.,           0.,           1.
234, 0.952177882194519, 0.305544197559357,           0.,           0.,           0.,           1.
235, 0.972534596920013, 0.232758462429047,           0.,           0.,           0.,           1.
236, 0.921958446502686, 0.387288868427277,           0.,           0.,           0.,           1.
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14792, 0.993712186813354, 0.111964479088783,           0.,           0.,           0.,           1.
*Distribution, name=PART-1-COPY_ORI-5-DISCORIENT, location=ELEMENT, Table=PART-1-COPY_ORI-5-DISCORIENT_Table
,           1.,           0.,           0.,           0.,           1.,           0.
291, 0.976465046405792, 0.215675726532936,           0.,           0.,           0.,           1.
292, 0.953884065151215, 0.300175309181213,           0.,           0.,           0.,           1.
293, 0.923995316028595, 0.38240385055542,           0.,           0.,           0.,           1.
294, 0.976885139942169, 0.213764876127243,           0.,           0.,           0.,           1.
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15870, 0.993712186813354, 0.111964471638203,           0.,           0.,           0.,           1.
*Distribution, name=PART-1-COPY_ORI-4-DISCORIENT, location=ELEMENT, Table=PART-1-COPY_ORI-4-DISCORIENT_Table
,           1.,           0.,           0.,           0.,           1.,           0.
349, 0.926523506641388, 0.376236915588379,           0.,           0.,           0.,           1.
350, 0.954731941223145, 0.297467529773712,           0.,           0.,           0.,           1.
351, 0.973984003067017, 0.226616710424423,           0.,           0.,           0.,           1.
352, 0.926173985004425, 0.377096503973007,           0.,           0.,           0.,           1.
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16332, 0.111964471638203, 0.993712186813354,           0.,           0.,           0.,           1.
*Distribution, name=PART-1-COPY_ORI-3-DISCORIENT, location=ELEMENT, Table=PART-1-COPY_ORI-3-DISCORIENT_Table
,           1.,           0.,           0.,           0.,           1.,           0.
407, 0.977731466293335, 0.209859922528267,           0.,           0.,           0.,           1.
408, 0.956357955932617, 0.292197614908218,           0.,           0.,           0.,           1.
409, 0.928054809570313, 0.372443675994873,           0.,           0.,           0.,           1.
410, 0.978124976158142, 0.208018198609352,           0.,           0.,           0.,           1.
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16178, 0.993712186813354, 0.111964471638203,           0.,           0.,           0.,           1.
*Distribution, name=PART-1-COPY_ORI-2-DISCORIENT, location=ELEMENT, Table=PART-1-COPY_ORI-2-DISCORIENT_Table
,           1.,           0.,           0.,           0.,           1.,           0.
465, 0.930371761322021, 0.366617470979691,           0.,           0.,           0.,           1.
466, 0.957081735134125, 0.289818078279495,           0.,           0.,           0.,           1.
467, 0.975320875644684, 0.220792204141617,           0.,           0.,           0.,           1.
468, 0.93005108833313, 0.367430210113525,           0.,           0.,           0.,           1.
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15408, 0.111964471638203, 0.993712186813354,           0.,           0.,           0.,           1.
*Distribution, name=PART-1-COPY_ORI-1-DISCORIENT, location=ELEMENT, Table=PART-1-COPY_ORI-1-DISCORIENT_Table
,           1.,           0.,           0.,           0.,           1.,           0.
523, 0.932179629802704, 0.361995995044708,           0.,           0.,           0.,           1.
524, 0.958185613155365, 0.28614729642868,           0.,           0.,           0.,           1.
525, 0.975952446460724, 0.2179836332798,           0.,           0.,           0.,           1.
526, 0.931874394416809, 0.362781137228012,           0.,           0.,           0.,           1.
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14176, 0.111964479088783, 0.993712186813354,           0.,           0.,           0.,           1.
*End Part
**
**
** ASSEMBLY
**
*Assembly, name=Assembly
**
*Instance, name=PART-1-COPY-1, part=PART-1-COPY
*End Instance
**
*Node
      1,           0.,           0.,           0.
*Nset, nset=RP-1
 1,
*Nset, nset=SET-2
 1,
*Nset, nset=SET-3, instance=PART-1-COPY-1
   343,   344,   345,   346,   347,   348
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*Elset, elset=SET-3, instance=PART-1-COPY-1
  6897,  6898,  6899,  6900,  6901,  6902
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*Nset, nset=SET-4, instance=PART-1-COPY-1
   379,   380,   381,   382,   383,   384
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*Elset, elset=SET-4, instance=PART-1-COPY-1
 11559, 11560, 11561, 11562, 11563, 11564
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** Constraint: Eqn-1
*Equation
2
SET-3, 3, 1.
RP-1, 3, -1.
*End Assembly
**
** ELEMENT CONTROLS
**
*Section Controls, name=EC-1, ELEMENT DELETION=YES
1., 1., 1.
*Amplitude, name=AMP-1
             0.,              0.,           0.001,           0.001,           0.002,           0.002,           0.003,           0.003
          0.004,           0.004,           0.005,           0.005,           0.006,           0.006,           0.007,           0.007
          0.008,           0.008,           0.009,           0.009,            0.01,            0.01,           0.011,           0.011
          0.012,           0.012,           0.013,           0.013,           0.014,           0.014,           0.015,           0.015
          0.016,           0.016,           0.017,           0.017,           0.018,           0.018,           0.019,           0.019
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             1.,              1.
**
** MATERIALS
**
*Material, name=CFRP
*Density
 1.8e-09,
*Elastic, type=ENGINEERING CONSTANTS
133000.,11500.,11500.,  0.32,  0.32,  0.37, 4800., 4800.
 4200.,
*Material, name=CFRP-UMAT-Hashin
*Density
 1.8e-09,
*Depvar, delete=13
     13,
*User Material, constants=23
133000.,11500.,11500.,  0.32,  0.32,  0.37, 4800., 4800.
 4200., 2100.,  972.,   37.,  147.,   37.,  147.,  71.5
  71.5,   32.,    1.,    1.,    1.,    1.,    1.
*Material, name=CFRP-UMAT-Puck
*Density
 1.8e-09,
*Depvar, delete=13
     13,
*User Material, constants=27
133000., 11500., 11500.,   0.32,   0.32,   0.37,  4800.,  4800.
  4200.,  2100.,   972.,    37.,   147.,    37.,   147.,   71.5
   71.5,    32.,  0.628,    1.2,231000.,    0.2,     1.,     1.
     1.,     1.,     1.
*Material, name=CFRP-VUMAT-Hashin
*Density
 1.8e-09,
*Depvar, delete=5
     17,
*User Material, constants=19
133000.,11500.,11500.,  0.32,  0.32,  0.37, 4800., 4800.
 4200., 2100.,  972.,   37.,  147.,   37.,  147.,  71.5
  71.5,   32., 1e-09
*Distribution Table, name=PART-1-COPY_ORI-7-DISCORIENT_Table
coord3d, coord3d
*Distribution Table, name=PART-1-COPY_ORI-8-DISCORIENT_Table
coord3d, coord3d
*Distribution Table, name=PART-1-COPY_ORI-6-DISCORIENT_Table
coord3d, coord3d
*Distribution Table, name=PART-1-COPY_ORI-5-DISCORIENT_Table
coord3d, coord3d
*Distribution Table, name=PART-1-COPY_ORI-4-DISCORIENT_Table
coord3d, coord3d
*Distribution Table, name=PART-1-COPY_ORI-3-DISCORIENT_Table
coord3d, coord3d
*Distribution Table, name=PART-1-COPY_ORI-2-DISCORIENT_Table
coord3d, coord3d
*Distribution Table, name=PART-1-COPY_ORI-1-DISCORIENT_Table
coord3d, coord3d
**
** BOUNDARY CONDITIONS
**
** Name: Disp-BC-1 Type: Displacement/Rotation
*Boundary
SET-3, 1, 1
** Name: Disp-BC-2 Type: Displacement/Rotation
*Boundary
SET-3, 2, 2
** Name: Disp-BC-3 Type: Displacement/Rotation
*Boundary
SET-4, 1, 1
** Name: Disp-BC-4 Type: Displacement/Rotation
*Boundary
SET-4, 2, 2
** Name: Disp-BC-5 Type: Displacement/Rotation
*Boundary
SET-4, 3, 3
** ----------------------------------------------------------------
**
** STEP: Step-1
**
*Step, name=Step-1, nlgeom=YES, inc=300
*Static
0.001, 1., 1e-15, 0.001
**
** BOUNDARY CONDITIONS
**
** Name: Disp-BC-6 Type: Displacement/Rotation
*Boundary
RP-1, 3, 3, 10.
**
** OUTPUT REQUESTS
**
*Restart, write, number interval=1, time marks=NO
**
** FIELD OUTPUT: F-Output-3
**
*Output, field, time interval=0.001, time marks=NO
*Contact Output
CSTRESS,
**
** FIELD OUTPUT: F-Output-2
**
*Element Output, directions=YES
LE, PE, PEEQ, S, SDV, STATUS
**
** FIELD OUTPUT: F-Output-1
**
*Node Output
RF, U, V
**
** HISTORY OUTPUT: H-Output-1
**
*Output, history, variable=PRESELECT, number interval=200, time marks=NO
*End Step
